OpenVSP model (file version 4), 4 components.
Geometry view with OpenVSP parameter names; values to 6 digits, angles in degrees, lengths in the model's unit.
Overall bounding box: X_Min=-0.25 X_Len=37.5789 Y_Min=-17.4593 Y_Len=34.9186 Z_Min=-1.81513 Z_Len=9.1897

Fuselage "Fuselage"
  location (X Y Z) 0 0 0, rotation 0 0 0
  bounding box size 37.08 3.63025 3.65663
  Design: Length=36.83
  cross sections:
    n  Spin     XLocPercent  YLocPercent  ZLocPercent  shape
    0  0        0            0            0            point
    1  0        0.0543036    0            0            super ellipse Super_Height=2.5 Super_M=2 Super_N=2 Super_Width=2.5
    2  1.63636  0.244366     0            0            ellipse Ellipse_Height=3.503 Ellipse_Width=3.503
    3  0        0.5          0            0            circle Circle_Diameter=3.503
    4  0        0.695696     0            0            ellipse Ellipse_Height=3.503 Ellipse_Width=3.503
    5  0        1            0            0.05         point

Wing "Aile", child of "Fuselage"
  location (X Y Z) 12.277 0 -0.238095, rotation 0 0 0
  symmetric about XZ
  bounding box size 9.42389 34.9186 2.01338
  totals: TotalSpan=35.052 TotalProjectedSpan=34.9186 TotalChord=3.895 TotalArea=136.528
  root: chord 6.333, twist 3, NACA 4-series Camber=0 CamberLoc=0.2 ThickChord=0.1
  sections:
    n  Span    Root_Chord  Tip_Chord  Area     Sweep    Sweep_Location  Dihedral  Twist  Twist_Location  tip airfoil
    1  17.526  6.333       1.457      68.2638  24.4345  0               5         0      0.25            as above

Wing "Empennage_Horizontal", child of "Fuselage"
  location (X Y Z) 32.579 0 1.66667, rotation 0 0 0
  symmetric about XZ
  bounding box size 3.88161 10.883 0.376668
  totals: TotalSpan=10.883 TotalProjectedSpan=10.883 TotalChord=2.0279 TotalArea=22.0696
  root: chord 3.24463, twist 0, NACA 4-series Camber=0 CamberLoc=0.2 ThickChord=0.1
  sections:
    n  Span     Root_Chord  Tip_Chord  Area     Sweep    Sweep_Location  Dihedral  Twist  Twist_Location  tip airfoil
    1  5.44151  3.24463     0.811158   11.0348  29.4345  0               0         0      0.25            as above

Wing "Empennage_Vertical", child of "Fuselage"
  location (X Y Z) 31.1504 0 1.42857, rotation 90 0 0
  bounding box size 6.17849 0.552215 5.946
  totals: TotalSpan=5.946 TotalProjectedSpan=5.946 TotalChord=2.973 TotalArea=17.6775
  root: chord 4.7568, twist 0, NACA 4-series Camber=0 CamberLoc=0.2 ThickChord=0.1
  sections:
    n  Span   Root_Chord  Tip_Chord  Area     Sweep  Sweep_Location  Dihedral  Twist  Twist_Location  tip airfoil
    1  5.946  4.7568      1.1892     17.6775  40     0               0         0      0.25            as above
